! ----------------------------------------------------------------------
! capsule_xy.mac
! 在全域 XY 平面（Z = 0）上建立一個膠囊形（跑道形）面。
!
! 【呼叫方式】
!   *USE,capsule_xy.mac,XC,YC,RADIUS,CENTER_SPACING,ANGLE_DEG
!
! ARG1 = XC
!   膠囊幾何中心的全域 X 座標。
! ARG2 = YC
!   膠囊幾何中心的全域 Y 座標。
! ARG3 = RADIUS
!   左右半圓端蓋的半徑，必須大於 0。
! ARG4 = CENTER_SPACING
!   左右端蓋圓心之間的距離，必須大於或等於 0。
! ARG5 = ANGLE_DEG
!   膠囊長軸相對全域 +X 的角度；正值由 +X 朝 +Y 逆時針旋轉。
!
! 【幾何定義】
!   總長度 = CENTER_SPACING + 2*RADIUS
!   總寬度 = 2*RADIUS
!   ARG4 > 0：中央矩形與左右兩個完整圓經 AADD 聯集為單一 slot 面。
!   ARG4 = 0：左右圓心重合，直接建立一個半徑為 ARG3 的完整圓面。
!
! 【重複執行】
!   每次呼叫前先讀取既有最大面號，再讓本次 primitive 從下一號開始。
!   因此布林刪除所留下的舊空號不會被本次建立流程回填，使用 MAXD
!   取得的 AR26、AR27、AR28 只會對應本次新建的矩形與兩個圓。
!   AADD 使用這三個明確面號，不會把上一次建立的面納入布林或刪除。
!
! 【工作平面與設定】
!   每次呼叫先把 working plane 對齊全域 Cartesian XY 平面，再將 WP
!   移到輸入中心並旋轉。建模完成後直接把 WP 移回全域原點與原方向，
!   不建立任何暫存局部座標系，也不需要管理自訂座標系編號。
!   BOPTN,KEEP,NO 會保留為目前的布林設定；精簡版不做布林失敗回滾。
!
! 【內部局部參數】
!   AR20 = 呼叫前已定義的最大面號
!   AR23 = 端蓋圓心距離的一半
!   AR26 = 本次中央矩形面號
!   AR27 = 本次左端圓面號
!   AR28 = 本次右端圓面號
!
! 【輸出】
! 成功呼叫後，新 slot／圓面一定比呼叫前的最大面號大，可立即取得：
!   *GET,parm,AREA,0,NUM,MAXD
! ----------------------------------------------------------------------

! 確保後續實體建立與布林指令在 PREP7 中執行。
/PREP7

! 輸入檢查：半徑不可為零或負值，圓心距離不可為負值。
! 條件不合法時只顯示警告，不建立或刪除任何幾何。
*IF,ARG3,LE,0,OR,ARG4,LT,0,THEN
  *MSG,WARN,ARG3,ARG4
CAPSULE_XY skipped: radius (%G) must be > 0 and spacing (%G) must be >= 0.
*ELSE

  ! --------------------------------------------------------------------
  ! 1. 隔離本次新建面的編號
  ! --------------------------------------------------------------------
  ! MAXD 取得資料庫內「已定義」的最大面號，不受目前 ASEL 選取集影響。
  ! NUMSTR 從 AR20+1 開始配置面號，確保接下來每個 MAXD 都是本次新面，
  ! 即使舊模型中因先前布林或刪除存在較小的空號，也不會誤抓舊模型。
  *GET,AR20,AREA,0,NUM,MAXD
  NUMSTR,AREA,AR20+1

  ! --------------------------------------------------------------------
  ! 2. 設定本次膠囊的建模 working plane
  ! --------------------------------------------------------------------
  ! WPCSYS,-1,0：將 WP 對齊全域 Cartesian XY 平面；-1 表示不改變視角。
  ! WPOFFS：將 WP 原點移到膠囊中心 (ARG1,ARG2,0)。
  ! WPROTA：繞 WP 的 +Z 軸旋轉 ARG5，使局部 X 軸成為膠囊長軸方向。
  ! 後續 RECTNG 與 CYL4 都使用同一個 WP，因此三個面保持共平面。
  WPCSYS,-1,0
  WPOFFS,ARG1,ARG2,0
  WPROTA,ARG5,0,0

  ! --------------------------------------------------------------------
  ! 3. 建立 slot，或在中心距離為零時建立圓面
  ! --------------------------------------------------------------------
  *IF,ARG4,GT,0,THEN
    ! 兩端圓心在 WP X 軸上的位置分別為 -AR23 與 +AR23。
    AR23=ARG4/2

    ! 中央矩形：X 範圍跨越兩圓心，Y 範圍為 -RADIUS 到 +RADIUS。
    ! NUMSTR 已隔離新面號，因此建立後的 MAXD 就是此矩形面號。
    RECTNG,-AR23,AR23,-ARG3,ARG3
    *GET,AR26,AREA,0,NUM,MAXD

    ! 左端完整圓：省略角度、第二半徑與深度時，CYL4 建立實心圓面。
    CYL4,-AR23,0,ARG3
    *GET,AR27,AREA,0,NUM,MAXD

    ! 右端完整圓。
    CYL4,AR23,0,ARG3
    *GET,AR28,AREA,0,NUM,MAXD

    ! KEEP,NO 使布林成功後刪除本次三個來源面，只留下聯集結果面。
    ! AADD 明確指定 AR26～AR28，不使用 ALL，因此不會處理任何舊面。
    BOPTN,KEEP,NO
    AADD,AR26,AR27,AR28
  *ELSE
    ! 圓心距離為零時，膠囊退化為單一完整圓，不需要執行布林。
    CYL4,0,0,ARG3
  *ENDIF

  ! --------------------------------------------------------------------
  ! 4. 將 working plane 移回全域原點
  ! --------------------------------------------------------------------
  ! 重新對齊全域 Cartesian 座標系 0，同時清除本次 WPOFFS 與 WPROTA
  ! 對 WP 造成的位移及旋轉；-1 表示恢復時不改變目前顯示視角。
  WPCSYS,-1,0

  ! 只把 AREA 的自動編號起點恢復成預設值 1，不影響 KP、LINE、VOLU、
  ! NODE 或 ELEM 的 NUMSTR 設定。已存在的面不會因重設起點而被覆寫。
  NUMSTR,AREA,1

*ENDIF
